## Plantemiento el modelo dinámico de un robot RRR
# Definición de funciones
T_i_j(x_i_j, y_i_j, θ_i_j) := [cos(θ_i_j), -sin(θ_i_j), 0, x_i_j; sin(θ_i_j), cos(θ_i_j), 0, y_i_j; 0, 0, 1, 0; 0, 0, 0, 1]
# Planteamiento del modelo de la posición
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T_0_1 := T_i_j(x_0_1, y_0_1, θ_0_1) → [cos(θ_0_1), -sin(θ_0_1), 0, x_0_1; sin(θ_0_1), cos(θ_0_1), 0, y_0_1; 0, 0, 1, 0; 0, 0, 0, 1]
T_1_2 := T_i_j(L_1, 0, θ_1_2) → [cos(θ_1_2), -sin(θ_1_2), 0, L_1; sin(θ_1_2), cos(θ_1_2), 0, 0; 0, 0, 1, 0; 0, 0, 0, 1]
T_2_3 := T_i_j(L_2, 0, θ_2_3) → [cos(θ_2_3), -sin(θ_2_3), 0, L_2; sin(θ_2_3), cos(θ_2_3), 0, 0; 0, 0, 1, 0; 0, 0, 0, 1]
T_3_P := T_i_j(L_3, 0, 0) → [1, 0, 0, L_3; 0, 1, 0, 0; 0, 0, 1, 0; 0, 0, 0, 1]
T_0_P := T_0_1*T_1_2*T_2_3*T_3_P simplify → [
    cos(θ_0_1 + θ_1_2 + θ_2_3), -sin(θ_0_1 + θ_1_2 + θ_2_3), 0, x_0_1 + L_3*cos(θ_0_1 + θ_1_2 + θ_2_3) + L_2*cos(θ_0_1 + θ_1_2) + L_1*cos(θ_0_1);
    sin(θ_0_1 + θ_1_2 + θ_2_3), cos(θ_0_1 + θ_1_2 + θ_2_3), 0, y_0_1 + L_3*sin(θ_0_1 + θ_1_2 + θ_2_3) + L_2*sin(θ_0_1 + θ_1_2) + L_1*sin(θ_0_1);
    0, 0, 1, 0;
    0, 0, 0, 1
]
# Definición de las matrices de rotación
R_0_1 := [
    T_0_1[0, 0], T_0_1[0, 1], T_0_1[0, 2];
    T_0_1[1, 0], T_0_1[1, 1], T_0_1[1, 2];
    T_0_1[2, 0], T_0_1[2, 1], T_0_1[2, 2]
] → [cos(θ_0_1), -sin(θ_0_1), 0; sin(θ_0_1), cos(θ_0_1), 0; 0, 0, 1]
R_1_2 := [
    T_1_2[0, 0], T_1_2[0, 1], T_1_2[0, 2];
    T_1_2[1, 0], T_1_2[1, 1], T_1_2[1, 2];
    T_1_2[2, 0], T_1_2[2, 1], T_1_2[2, 2]
] → [cos(θ_1_2), -sin(θ_1_2), 0; sin(θ_1_2), cos(θ_1_2), 0; 0, 0, 1]
R_2_3 := [
    T_2_3[0, 0], T_2_3[0, 1], T_2_3[0, 2];
    T_2_3[1, 0], T_2_3[1, 1], T_2_3[1, 2];
    T_2_3[2, 0], T_2_3[2, 1], T_2_3[2, 2]
] → [cos(θ_2_3), -sin(θ_2_3), 0; sin(θ_2_3), cos(θ_2_3), 0; 0, 0, 1]
R_3_P := [
    T_3_P[0, 0], T_3_P[0, 1], T_3_P[0, 2];
    T_3_P[1, 0], T_3_P[1, 1], T_3_P[1, 2];
    T_3_P[2, 0], T_3_P[2, 1], T_3_P[2, 2]
] → [1, 0, 0; 0, 1, 0; 0, 0, 1]
## Calculo de la propagación de velocidades
# Propagación de velocidades del sistema {0} al {1}
# velocidade en el sistema {0}
v_0_0 := [0; 0; 0]
ω_0_0 := [0; 0; 0]
# Propagación de la velocidad angular
R_1_0 := transpose(R_0_1) → [cos(θ_0_1), sin(θ_0_1), 0; -sin(θ_0_1), cos(θ_0_1), 0; 0, 0, 1]
ω_1_1 := R_1_0*ω_0_0 + [0; 0; 1]*θ'_0_1 → [0; 0; θ'_0_1]
# Velocidad lineal
p_0_1 := [x_0_1; y_0_1; 0]
v_1_1 := R_1_0*(v_0_0 + ω_0_0×p_0_1) → [0; 0; 0]
# Propagación de velocidades del sistema {1} al {2}
# Propagación de la velocidad angular
R_2_1 := transpose(R_1_2) → [cos(θ_1_2), sin(θ_1_2), 0; -sin(θ_1_2), cos(θ_1_2), 0; 0, 0, 1]
ω_2_2 := R_2_1*ω_1_1 + [0; 0; 1]*θ'_1_2 → [0; 0; θ'_0_1 + θ'_1_2]
# Velocidad lineal
p_1_2 := [L_1; 0; 0]
v_2_2 := R_2_1*(v_1_1 + ω_1_1×p_1_2) → [L_1*θ'_0_1*sin(θ_1_2); L_1*θ'_0_1*cos(θ_1_2); 0]
# Propagación de velocidades del sistema {2} al {3}
# Propagación de la velocidad angular
R_3_2 := transpose(R_2_3) → [cos(θ_2_3), sin(θ_2_3), 0; -sin(θ_2_3), cos(θ_2_3), 0; 0, 0, 1]
ω_3_3 := R_3_2*ω_2_2 + [0; 0; 1]*θ'_2_3 → [0; 0; θ'_0_1 + θ'_1_2 + θ'_2_3]
# Velocidad lineal
p_2_3 := [L_2; 0; 0]
v_3_3 := R_3_2*(v_2_2 + ω_2_2×p_2_3) simplify → [
    L_1*θ'_0_1*sin(θ_1_2 + θ_2_3) + L_2*θ'_0_1*sin(θ_2_3) + L_2*θ'_1_2*sin(θ_2_3);
    L_1*θ'_0_1*cos(θ_1_2 + θ_2_3) + L_2*θ'_0_1*cos(θ_2_3) + L_2*θ'_1_2*cos(θ_2_3);
    0
]
# Propagación de velocidades del sistema {3} al {P}
# Propagación de la velocidad angular
R_P_3 := transpose(R_3_P) → [1, 0, 0; 0, 1, 0; 0, 0, 1]
ω_P_P := R_P_3*ω_3_3 + [0; 0; 1]*0 → [0; 0; θ'_0_1 + θ'_1_2 + θ'_2_3]
# Velocidad lineal
p_3_P := [L_3; 0; 0]
v_P_P := R_P_3*(v_3_3 + ω_3_3×p_3_P) simplify → [
    L_1*θ'_0_1*sin(θ_1_2 + θ_2_3) + L_2*θ'_0_1*sin(θ_2_3) + L_2*θ'_1_2*sin(θ_2_3);
    L_3*θ'_0_1 + L_3*θ'_1_2 + L_3*θ'_2_3 + L_1*θ'_0_1*cos(θ_1_2 + θ_2_3) + L_2*θ'_0_1*cos(θ_2_3) + L_2*θ'_1_2*cos(θ_2_3);
    0
]
# Cálculo de las velocidades en los centros de masa
R_c1_1 := [1, 0, 0; 0, 1, 0; 0, 0, 1]
ω_c1_c1 := R_c1_1*ω_1_1 + [0; 0; 0]*0 → [0; 0; θ'_0_1]
p_1_c1 := [L_1/2; 0; 0]
v_c1_c1 := R_c1_1*(v_1_1 + ω_1_1×p_1_c1) simplify → [0; L_1*θ'_0_1/2; 0]
# energía cinética potencial
# eslabón 1
I_c1 := m_1/12*[b_1^2 + h_1^2, 0, 0; 0, L_1^2 + b_1^2, 0; 0, 0, L_1^2 + h_1^2]
k_1 := m_1/2*(transpose(v_c1_c1)*v_c1_c1) + 1/2*transpose(ω_1_1)*I_c1*ω_1_1 simplify → m_1*θ'_0_1^2*(4*L_1^2 + h_1^2)/24
# Energía potencial
T_1_c1 := T_i_j(L_1/2, 0, 0) → [1, 0, 0, L_1/2; 0, 1, 0, 0; 0, 0, 1, 0; 0, 0, 0, 1]
T_0_c1 := T_0_1*T_1_c1
p_0_c1 := [T_0_c1[0, 3]; T_0_c1[1, 3]; T_0_c1[2, 3]] → [x_0_1 + L_1*cos(θ_0_1)/2; y_0_1 + L_1*sin(θ_0_1)/2; 0]
# Definición del vector de gravedad
g_0 := [0; -g; 0]
# energía potencias del primer eslabón
u_1 := -m_1*transpose(g_0)*p_0_c1 → g*m_1*(y_0_1 + L_1*sin(θ_0_1)/2)
# energía cinética potencial
# eslabón 2
p_2_c2 := [L_2/2; 0; 0]
R_c2_2 := [1, 0, 0; 0, 1, 0; 0, 0, 1]
v_c2_c2 := R_c2_2*(v_2_2 + ω_2_2×p_2_c2) simplify → [L_1*θ'_0_1*sin(θ_1_2); L_2*θ'_0_1/2 + L_2*θ'_1_2/2 + L_1*θ'_0_1*cos(θ_1_2); 0]
I_c2 := m_2/12*[b_2^2 + h_2^2, 0, 0; 0, L_2^2 + b_2^2, 0; 0, 0, L_2^2 + h_2^2]
k_2 := m_2/2*(transpose(v_c2_c2)*v_c2_c2) + 1/2*transpose(ω_2_2)*I_c2*ω_2_2 → m_2*((L_2*θ'_0_1/2 + L_2*θ'_1_2/2 + L_1*θ'_0_1*cos(θ_1_2))^2 + L_1^2*θ'_0_1^2*sin(θ_1_2)^2)/2 + m_2*(L_2^2 + h_2^2)*(θ'_0_1/2 + θ'_1_2/2)*(θ'_0_1 + θ'_1_2)/12
# Energía potencial
T_2_c2 := T_i_j(L_2/2, 0, 0) → [1, 0, 0, L_2/2; 0, 1, 0, 0; 0, 0, 1, 0; 0, 0, 0, 1]
T_0_c2 := T_0_1*T_1_2*T_2_c2
p_0_c2 := [T_0_c2[0, 3]; T_0_c2[1, 3]; T_0_c2[2, 3]] simplify → [
    x_0_1 + L_2*cos(θ_0_1 + θ_1_2)/2 + L_1*cos(θ_0_1);
    y_0_1 + L_2*sin(θ_0_1 + θ_1_2)/2 + L_1*sin(θ_0_1);
    0
]
# Definición del vector de gravedad
g_0 := [0; -g; 0]
u_2 := -m_2*transpose(g_0)*p_0_c2 → g*m_2*(y_0_1 + L_2*sin(θ_0_1 + θ_1_2)/2 + L_1*sin(θ_0_1))
# energía cinética potencial
# eslabón 3
p_3_c3 := [L_3/2; 0; 0]
R_c3_3 := [1, 0, 0; 0, 1, 0; 0, 0, 1]
v_c3_c3 := R_c3_3*(v_3_3 + ω_3_3×p_3_c3) simplify → [
    L_1*θ'_0_1*sin(θ_1_2 + θ_2_3) + L_2*θ'_0_1*sin(θ_2_3) + L_2*θ'_1_2*sin(θ_2_3);
    L_3*θ'_0_1/2 + L_3*θ'_1_2/2 + L_3*θ'_2_3/2 + L_1*θ'_0_1*cos(θ_1_2 + θ_2_3) + L_2*θ'_0_1*cos(θ_2_3) + L_2*θ'_1_2*cos(θ_2_3);
    0
]
I_c3 := m_3/12*[b_3^2 + h_3^2, 0, 0; 0, L_3^2 + b_3^2, 0; 0, 0, L_3^2 + h_3^2]
k_3 := m_3/2*(transpose(v_c3_c3)*v_c3_c3) + 1/2*transpose(ω_3_3)*I_c3*ω_3_3 → m_3*((L_1*θ'_0_1*sin(θ_1_2 + θ_2_3) + L_2*θ'_0_1*sin(θ_2_3) + L_2*θ'_1_2*sin(θ_2_3))^2 + (L_3*θ'_0_1/2 + L_3*θ'_1_2/2 + L_3*θ'_2_3/2 + L_1*θ'_0_1*cos(θ_1_2 + θ_2_3) + L_2*θ'_0_1*cos(θ_2_3) + L_2*θ'_1_2*cos(θ_2_3))^2)/2 + m_3*(L_3^2 + h_3^2)*(θ'_0_1 + θ'_1_2 + θ'_2_3)*(θ'_0_1/2 + θ'_1_2/2 + θ'_2_3/2)/12
# Energía potencial
T_3_c3 := T_i_j(L_3/2, 0, 0) → [1, 0, 0, L_3/2; 0, 1, 0, 0; 0, 0, 1, 0; 0, 0, 0, 1]
T_0_c3 := T_0_1*T_1_2*T_2_3*T_3_c3
p_0_c3 := [T_0_c3[0, 3]; T_0_c3[1, 3]; T_0_c3[2, 3]] simplify → [
    x_0_1 + L_3*cos(θ_0_1 + θ_1_2 + θ_2_3)/2 + L_2*cos(θ_0_1 + θ_1_2) + L_1*cos(θ_0_1);
    y_0_1 + L_3*sin(θ_0_1 + θ_1_2 + θ_2_3)/2 + L_2*sin(θ_0_1 + θ_1_2) + L_1*sin(θ_0_1);
    0
]
# Definición del vector de gravedad
g_0 := [0; -g; 0]
u_3 := -m_3*transpose(g_0)*p_0_c3 → g*m_3*(y_0_1 + L_3*sin(θ_0_1 + θ_1_2 + θ_2_3)/2 + L_2*sin(θ_0_1 + θ_1_2) + L_1*sin(θ_0_1))
## Cálculo del Lagrangeano
Γ := (k_1 + k_2 + k_3) - (u_1 + u_2 + u_3)
Γ → m_3*((L_1*θ'_0_1*sin(θ_1_2 + θ_2_3) + L_2*θ'_0_1*sin(θ_2_3) + L_2*θ'_1_2*sin(θ_2_3))^2 + (L_3*θ'_0_1/2 + L_3*θ'_1_2/2 + L_3*θ'_2_3/2 + L_1*θ'_0_1*cos(θ_1_2 + θ_2_3) + L_2*θ'_0_1*cos(θ_2_3) + L_2*θ'_1_2*cos(θ_2_3))^2)/2 + m_2*((L_2*θ'_0_1/2 + L_2*θ'_1_2/2 + L_1*θ'_0_1*cos(θ_1_2))^2 + L_1^2*θ'_0_1^2*sin(θ_1_2)^2)/2 - g*m_2*(y_0_1 + L_2*sin(θ_0_1 + θ_1_2)/2 + L_1*sin(θ_0_1)) - g*m_3*(y_0_1 + L_3*sin(θ_0_1 + θ_1_2 + θ_2_3)/2 + L_2*sin(θ_0_1 + θ_1_2) + L_1*sin(θ_0_1)) + m_1*θ'_0_1^2*(4*L_1^2 + h_1^2)/24 - g*m_1*(y_0_1 + L_1*sin(θ_0_1)/2) + m_2*(L_2^2 + h_2^2)*(θ'_0_1/2 + θ'_1_2/2)*(θ'_0_1 + θ'_1_2)/12 + m_3*(L_3^2 + h_3^2)*(θ'_0_1 + θ'_1_2 + θ'_2_3)*(θ'_0_1/2 + θ'_1_2/2 + θ'_2_3/2)/12
# Cálculo del par τ_θ1
# cálculo de la derivada parcial
D_θ1 := d/dθ'_0_1(Γ) collect, m_1, m_2, m_3 → θ'_0_1*(4*L_1^2 + h_1^2)/12*m_1 + ((L_2^2 + h_2^2)*(θ'_0_1/2 + θ'_1_2/2)/12 + (L_2^2 + h_2^2)*(θ'_0_1 + θ'_1_2)/24 + (L_2/2 + L_1*cos(θ_1_2))*(L_2*θ'_0_1/2 + L_2*θ'_1_2/2 + L_1*θ'_0_1*cos(θ_1_2)) + L_1^2*θ'_0_1*sin(θ_1_2)^2)*m_2 + ((L_1*sin(θ_1_2 + θ_2_3) + L_2*sin(θ_2_3))*(L_1*θ'_0_1*sin(θ_1_2 + θ_2_3) + L_2*θ'_0_1*sin(θ_2_3) + L_2*θ'_1_2*sin(θ_2_3)) + (L_3^2 + h_3^2)*(θ'_0_1/2 + θ'_1_2/2 + θ'_2_3/2)/12 + (L_3/2 + L_1*cos(θ_1_2 + θ_2_3) + L_2*cos(θ_2_3))*(L_3*θ'_0_1/2 + L_3*θ'_1_2/2 + L_3*θ'_2_3/2 + L_1*θ'_0_1*cos(θ_1_2 + θ_2_3) + L_2*θ'_0_1*cos(θ_2_3) + L_2*θ'_1_2*cos(θ_2_3)) + (L_3^2 + h_3^2)*(θ'_0_1 + θ'_1_2 + θ'_2_3)/24)*m_3
Dt_θ1 := D_θ1 substitute, θ_0_1 == θ_0_1(t); substitute, θ_1_2 == θ_1_2(t); substitute, θ_2_3 == θ_2_3(t); substitute, θ'_0_1 == θ'_0_1(t); substitute, θ'_1_2 == θ'_1_2(t); substitute, θ'_2_3 == θ'_2_3(t) → L_1^2*m_1*θ'_0_1(t)/3 + L_1^2*m_2*θ'_0_1(t) + L_1^2*m_3*θ'_0_1(t) + L_2^2*m_2*θ'_0_1(t)/3 + L_2^2*m_3*θ'_0_1(t) + L_2^2*m_2*θ'_1_2(t)/3 + L_3^2*m_3*θ'_0_1(t)/3 + L_2^2*m_3*θ'_1_2(t) + L_3^2*m_3*θ'_1_2(t)/3 + L_3^2*m_3*θ'_2_3(t)/3 + h_1^2*m_1*θ'_0_1(t)/12 + h_2^2*m_2*θ'_0_1(t)/12 + h_2^2*m_2*θ'_1_2(t)/12 + h_3^2*m_3*θ'_0_1(t)/12 + h_3^2*m_3*θ'_1_2(t)/12 + h_3^2*m_3*θ'_2_3(t)/12 + L_1*L_3*m_3*θ'_0_1(t)*cos(θ_1_2(t) + θ_2_3(t)) + L_1*L_3*m_3*θ'_1_2(t)*cos(θ_1_2(t) + θ_2_3(t))/2 + L_1*L_3*m_3*θ'_2_3(t)*cos(θ_1_2(t) + θ_2_3(t))/2 + L_1*L_2*m_2*θ'_0_1(t)*cos(θ_1_2(t)) + 2*L_1*L_2*m_3*θ'_0_1(t)*cos(θ_1_2(t)) + L_1*L_2*m_2*θ'_1_2(t)*cos(θ_1_2(t))/2 + L_1*L_2*m_3*θ'_1_2(t)*cos(θ_1_2(t)) + L_2*L_3*m_3*θ'_0_1(t)*cos(θ_2_3(t)) + L_2*L_3*m_3*θ'_1_2(t)*cos(θ_2_3(t)) + L_2*L_3*m_3*θ'_2_3(t)*cos(θ_2_3(t))/2
τ_θ1p := d/dt(Dt_θ1) - d/dθ_0_1(Γ) → L_1^2*m_1*d/dt(θ'_0_1(t))/3 + L_1^2*m_2*d/dt(θ'_0_1(t)) + L_1^2*m_3*d/dt(θ'_0_1(t)) + L_2^2*m_2*d/dt(θ'_0_1(t))/3 + L_2^2*m_3*d/dt(θ'_0_1(t)) + L_2^2*m_2*d/dt(θ'_1_2(t))/3 + L_3^2*m_3*d/dt(θ'_0_1(t))/3 + L_2^2*m_3*d/dt(θ'_1_2(t)) + L_3^2*m_3*d/dt(θ'_1_2(t))/3 + L_3^2*m_3*d/dt(θ'_2_3(t))/3 + g*m_3*(L_3*cos(θ_0_1 + θ_1_2 + θ_2_3)/2 + L_2*cos(θ_0_1 + θ_1_2) + L_1*cos(θ_0_1)) + h_1^2*m_1*d/dt(θ'_0_1(t))/12 + h_2^2*m_2*d/dt(θ'_0_1(t))/12 + h_2^2*m_2*d/dt(θ'_1_2(t))/12 + h_3^2*m_3*d/dt(θ'_0_1(t))/12 + h_3^2*m_3*d/dt(θ'_1_2(t))/12 + h_3^2*m_3*d/dt(θ'_2_3(t))/12 + g*m_2*(L_2*cos(θ_0_1 + θ_1_2)/2 + L_1*cos(θ_0_1)) + L_1*g*m_1*cos(θ_0_1)/2 + L_1*L_3*m_3*d/dt(θ'_0_1(t))*cos(θ_1_2(t) + θ_2_3(t)) + L_1*L_3*m_3*d/dt(θ'_1_2(t))*cos(θ_1_2(t) + θ_2_3(t))/2 + L_1*L_3*m_3*d/dt(θ'_2_3(t))*cos(θ_1_2(t) + θ_2_3(t))/2 + L_1*L_2*m_2*d/dt(θ'_0_1(t))*cos(θ_1_2(t)) + 2*L_1*L_2*m_3*d/dt(θ'_0_1(t))*cos(θ_1_2(t)) + L_1*L_2*m_2*d/dt(θ'_1_2(t))*cos(θ_1_2(t))/2 + L_1*L_2*m_3*d/dt(θ'_1_2(t))*cos(θ_1_2(t)) + L_2*L_3*m_3*d/dt(θ'_0_1(t))*cos(θ_2_3(t)) + L_2*L_3*m_3*d/dt(θ'_1_2(t))*cos(θ_2_3(t)) + L_2*L_3*m_3*d/dt(θ'_2_3(t))*cos(θ_2_3(t))/2 - L_1*L_3*m_3*θ'_0_1(t)*sin(θ_1_2(t) + θ_2_3(t))*(d/dt(θ_1_2(t)) + d/dt(θ_2_3(t))) - L_1*L_3*m_3*θ'_1_2(t)*sin(θ_1_2(t) + θ_2_3(t))*(d/dt(θ_1_2(t)) + d/dt(θ_2_3(t)))/2 - L_1*L_3*m_3*θ'_2_3(t)*sin(θ_1_2(t) + θ_2_3(t))*(d/dt(θ_1_2(t)) + d/dt(θ_2_3(t)))/2 - L_1*L_2*m_2*θ'_0_1(t)*d/dt(θ_1_2(t))*sin(θ_1_2(t)) - 2*L_1*L_2*m_3*θ'_0_1(t)*d/dt(θ_1_2(t))*sin(θ_1_2(t)) - L_1*L_2*m_2*θ'_1_2(t)*d/dt(θ_1_2(t))*sin(θ_1_2(t))/2 - L_1*L_2*m_3*θ'_1_2(t)*d/dt(θ_1_2(t))*sin(θ_1_2(t)) - L_2*L_3*m_3*θ'_0_1(t)*d/dt(θ_2_3(t))*sin(θ_2_3(t)) - L_2*L_3*m_3*θ'_1_2(t)*d/dt(θ_2_3(t))*sin(θ_2_3(t)) - L_2*L_3*m_3*θ'_2_3(t)*d/dt(θ_2_3(t))*sin(θ_2_3(t))/2
τ_θ1 := τ_θ1p substitute, θ_0_1(t) == θ_0_1; substitute, θ_1_2(t) == θ_1_2; substitute, θ_2_3(t) == θ2_3; substitute, d/dt(θ'_0_1(t)) == θ''_0_1; substitute, d/dt(θ'_1_2(t)) == θ''_1_2; substitute, d/dt(θ'_2_3(t)) == θ''_2_3; substitute, d/dt(θ_1_2(t)) == θ'_1_2; substitute, d/dt(θ_2_3(t)) == θ'_2_3; substitute, d/dt(θ_0_1(t)) == θ'_0_1; collect, m_1, m_2, m_3 → (θ''_0_1*L_1^2/3 + g*cos(θ_0_1)*L_1/2 + θ''_0_1*h_1^2/12)*m_1 + (L_1^2*θ''_0_1 + L_2^2*θ''_0_1/3 + L_2^2*θ''_1_2/3 + h_2^2*θ''_0_1/12 + h_2^2*θ''_1_2/12 + L_2*g*cos(θ_0_1 + θ_1_2)/2 + L_1*g*cos(θ_0_1) + L_1*L_2*θ''_0_1*cos(θ_1_2) + L_1*L_2*θ''_1_2*cos(θ_1_2)/2 - L_1*L_2*θ'_1_2*θ'_0_1(t)*sin(θ_1_2) - L_1*L_2*θ'_1_2*θ'_1_2(t)*sin(θ_1_2)/2)*m_2 + (L_1^2*θ''_0_1 + L_2^2*θ''_0_1 + L_3^2*θ''_0_1/3 + L_2^2*θ''_1_2 + L_3^2*θ''_1_2/3 + L_3^2*θ''_2_3/3 + h_3^2*θ''_0_1/12 + h_3^2*θ''_1_2/12 + h_3^2*θ''_2_3/12 + L_2*g*cos(θ_0_1 + θ_1_2) + L_1*g*cos(θ_0_1) + L_3*g*cos(θ_0_1 + θ_1_2 + θ_2_3)/2 + L_1*L_3*θ''_0_1*cos(θ2_3 + θ_1_2) + L_1*L_3*θ''_1_2*cos(θ2_3 + θ_1_2)/2 + L_1*L_3*θ''_2_3*cos(θ2_3 + θ_1_2)/2 + L_2*L_3*θ''_0_1*cos(θ2_3) + L_2*L_3*θ''_1_2*cos(θ2_3) + L_2*L_3*θ''_2_3*cos(θ2_3)/2 + 2*L_1*L_2*θ''_0_1*cos(θ_1_2) + L_1*L_2*θ''_1_2*cos(θ_1_2) - L_1*L_3*θ'_1_2*θ'_0_1(t)*sin(θ2_3 + θ_1_2) - L_1*L_3*θ'_1_2*θ'_1_2(t)*sin(θ2_3 + θ_1_2)/2 - L_1*L_3*θ'_2_3*θ'_0_1(t)*sin(θ2_3 + θ_1_2) - L_1*L_3*θ'_1_2*θ'_2_3(t)*sin(θ2_3 + θ_1_2)/2 - L_1*L_3*θ'_2_3*θ'_1_2(t)*sin(θ2_3 + θ_1_2)/2 - L_1*L_3*θ'_2_3*θ'_2_3(t)*sin(θ2_3 + θ_1_2)/2 - L_2*L_3*θ'_2_3*θ'_0_1(t)*sin(θ2_3) - L_2*L_3*θ'_2_3*θ'_1_2(t)*sin(θ2_3) - L_2*L_3*θ'_2_3*θ'_2_3(t)*sin(θ2_3)/2 - 2*L_1*L_2*θ'_1_2*θ'_0_1(t)*sin(θ_1_2) - L_1*L_2*θ'_1_2*θ'_1_2(t)*sin(θ_1_2))*m_3
# Cálculo del par τ_θ2
# cálculo de la derivada parcial
D_θ2 := d/dθ'_1_2(Γ) collect, m_1, m_2, m_3 → ((L_2^2 + h_2^2)*(θ'_0_1/2 + θ'_1_2/2)/12 + (L_2^2 + h_2^2)*(θ'_0_1 + θ'_1_2)/24 + L_2*(L_2*θ'_0_1/2 + L_2*θ'_1_2/2 + L_1*θ'_0_1*cos(θ_1_2))/2)*m_2 + ((L_3^2 + h_3^2)*(θ'_0_1/2 + θ'_1_2/2 + θ'_2_3/2)/12 + (L_3/2 + L_2*cos(θ_2_3))*(L_3*θ'_0_1/2 + L_3*θ'_1_2/2 + L_3*θ'_2_3/2 + L_1*θ'_0_1*cos(θ_1_2 + θ_2_3) + L_2*θ'_0_1*cos(θ_2_3) + L_2*θ'_1_2*cos(θ_2_3)) + (L_3^2 + h_3^2)*(θ'_0_1 + θ'_1_2 + θ'_2_3)/24 + L_2*sin(θ_2_3)*(L_1*θ'_0_1*sin(θ_1_2 + θ_2_3) + L_2*θ'_0_1*sin(θ_2_3) + L_2*θ'_1_2*sin(θ_2_3)))*m_3
Dt_θ2 := D_θ2 substitute, θ_0_1 == θ_0_1(t); substitute, θ_1_2 == θ_1_2(t); substitute, θ_2_3 == θ_2_3(t); substitute, θ'_0_1 == θ'_0_1(t); substitute, θ'_1_2 == θ'_1_2(t); substitute, θ'_2_3 == θ'_2_3(t) → L_2^2*m_2*θ'_0_1(t)/3 + L_2^2*m_3*θ'_0_1(t) + L_2^2*m_2*θ'_1_2(t)/3 + L_3^2*m_3*θ'_0_1(t)/3 + L_2^2*m_3*θ'_1_2(t) + L_3^2*m_3*θ'_1_2(t)/3 + L_3^2*m_3*θ'_2_3(t)/3 + h_2^2*m_2*θ'_0_1(t)/12 + h_2^2*m_2*θ'_1_2(t)/12 + h_3^2*m_3*θ'_0_1(t)/12 + h_3^2*m_3*θ'_1_2(t)/12 + h_3^2*m_3*θ'_2_3(t)/12 + L_1*L_3*m_3*θ'_0_1(t)*cos(θ_1_2(t) + θ_2_3(t))/2 + L_1*L_2*m_2*θ'_0_1(t)*cos(θ_1_2(t))/2 + L_1*L_2*m_3*θ'_0_1(t)*cos(θ_1_2(t)) + L_2*L_3*m_3*θ'_0_1(t)*cos(θ_2_3(t)) + L_2*L_3*m_3*θ'_1_2(t)*cos(θ_2_3(t)) + L_2*L_3*m_3*θ'_2_3(t)*cos(θ_2_3(t))/2
τ_θ2p := d/dt(Dt_θ2) - d/dθ_1_2(Γ) → m_3*(2*L_1*θ'_0_1*sin(θ_1_2 + θ_2_3)*(L_3*θ'_0_1/2 + L_3*θ'_1_2/2 + L_3*θ'_2_3/2 + L_1*θ'_0_1*cos(θ_1_2 + θ_2_3) + L_2*θ'_0_1*cos(θ_2_3) + L_2*θ'_1_2*cos(θ_2_3)) - 2*L_1*θ'_0_1*cos(θ_1_2 + θ_2_3)*(L_1*θ'_0_1*sin(θ_1_2 + θ_2_3) + L_2*θ'_0_1*sin(θ_2_3) + L_2*θ'_1_2*sin(θ_2_3)))/2 - m_2*(2*L_1^2*θ'_0_1^2*cos(θ_1_2)*sin(θ_1_2) - 2*L_1*θ'_0_1*sin(θ_1_2)*(L_2*θ'_0_1/2 + L_2*θ'_1_2/2 + L_1*θ'_0_1*cos(θ_1_2)))/2 + L_2^2*m_2*d/dt(θ'_0_1(t))/3 + L_2^2*m_3*d/dt(θ'_0_1(t)) + L_2^2*m_2*d/dt(θ'_1_2(t))/3 + L_3^2*m_3*d/dt(θ'_0_1(t))/3 + L_2^2*m_3*d/dt(θ'_1_2(t)) + L_3^2*m_3*d/dt(θ'_1_2(t))/3 + L_3^2*m_3*d/dt(θ'_2_3(t))/3 + h_2^2*m_2*d/dt(θ'_0_1(t))/12 + h_2^2*m_2*d/dt(θ'_1_2(t))/12 + h_3^2*m_3*d/dt(θ'_0_1(t))/12 + h_3^2*m_3*d/dt(θ'_1_2(t))/12 + h_3^2*m_3*d/dt(θ'_2_3(t))/12 + g*m_3*(L_3*cos(θ_0_1 + θ_1_2 + θ_2_3)/2 + L_2*cos(θ_0_1 + θ_1_2)) + L_2*g*m_2*cos(θ_0_1 + θ_1_2)/2 + L_1*L_3*m_3*d/dt(θ'_0_1(t))*cos(θ_1_2(t) + θ_2_3(t))/2 + L_1*L_2*m_2*d/dt(θ'_0_1(t))*cos(θ_1_2(t))/2 + L_1*L_2*m_3*d/dt(θ'_0_1(t))*cos(θ_1_2(t)) + L_2*L_3*m_3*d/dt(θ'_0_1(t))*cos(θ_2_3(t)) + L_2*L_3*m_3*d/dt(θ'_1_2(t))*cos(θ_2_3(t)) + L_2*L_3*m_3*d/dt(θ'_2_3(t))*cos(θ_2_3(t))/2 - L_1*L_3*m_3*θ'_0_1(t)*sin(θ_1_2(t) + θ_2_3(t))*(d/dt(θ_1_2(t)) + d/dt(θ_2_3(t)))/2 - L_1*L_2*m_2*θ'_0_1(t)*d/dt(θ_1_2(t))*sin(θ_1_2(t))/2 - L_1*L_2*m_3*θ'_0_1(t)*d/dt(θ_1_2(t))*sin(θ_1_2(t)) - L_2*L_3*m_3*θ'_0_1(t)*d/dt(θ_2_3(t))*sin(θ_2_3(t)) - L_2*L_3*m_3*θ'_1_2(t)*d/dt(θ_2_3(t))*sin(θ_2_3(t)) - L_2*L_3*m_3*θ'_2_3(t)*d/dt(θ_2_3(t))*sin(θ_2_3(t))/2
τ_θ2 := τ_θ2p substitute, θ_0_1(t) == θ_0_1; substitute, θ_1_2(t) == θ_1_2; substitute, θ_2_3(t) == θ2_3; substitute, d/dt(θ'_0_1(t)) == θ''_0_1; substitute, d/dt(θ'_1_2(t)) == θ''_1_2; substitute, d/dt(θ'_2_3(t)) == θ''_2_3; substitute, d/dt(θ_1_2(t)) == θ'_1_2; substitute, d/dt(θ_2_3(t)) == θ'_2_3; substitute, d/dt(θ_0_1(t)) == θ'_0_1; collect, m_1, m_2, m_3 → (L_2^2*θ''_0_1/3 + L_2^2*θ''_1_2/3 + h_2^2*θ''_0_1/12 + h_2^2*θ''_1_2/12 + L_2*g*cos(θ_0_1 + θ_1_2)/2 + L_1*L_2*θ''_0_1*cos(θ_1_2)/2 + L_1*L_2*θ'_0_1^2*sin(θ_1_2)/2 - L_1*L_2*θ'_1_2*θ'_0_1(t)*sin(θ_1_2)/2 + L_1*L_2*θ'_0_1*θ'_1_2*sin(θ_1_2)/2)*m_2 + (L_2^2*θ''_0_1 + L_3^2*θ''_0_1/3 + L_2^2*θ''_1_2 + L_3^2*θ''_1_2/3 + L_3^2*θ''_2_3/3 + h_3^2*θ''_0_1/12 + h_3^2*θ''_1_2/12 + h_3^2*θ''_2_3/12 + L_2*g*cos(θ_0_1 + θ_1_2) + L_3*g*cos(θ_0_1 + θ_1_2 + θ_2_3)/2 + L_1*L_3*θ''_0_1*cos(θ2_3 + θ_1_2)/2 + L_2*L_3*θ''_0_1*cos(θ2_3) + L_2*L_3*θ''_1_2*cos(θ2_3) + L_2*L_3*θ''_2_3*cos(θ2_3)/2 + L_1*L_2*θ''_0_1*cos(θ_1_2) + L_1*L_3*θ'_0_1^2*sin(θ_1_2 + θ_2_3)/2 + L_1*L_2*θ'_0_1^2*sin(θ_1_2) - L_1*L_3*θ'_1_2*θ'_0_1(t)*sin(θ2_3 + θ_1_2)/2 - L_1*L_3*θ'_2_3*θ'_0_1(t)*sin(θ2_3 + θ_1_2)/2 - L_2*L_3*θ'_2_3*θ'_0_1(t)*sin(θ2_3) - L_2*L_3*θ'_2_3*θ'_1_2(t)*sin(θ2_3) - L_2*L_3*θ'_2_3*θ'_2_3(t)*sin(θ2_3)/2 - L_1*L_2*θ'_1_2*θ'_0_1(t)*sin(θ_1_2) + L_1*L_3*θ'_0_1*θ'_1_2*sin(θ_1_2 + θ_2_3)/2 + L_1*L_3*θ'_0_1*θ'_2_3*sin(θ_1_2 + θ_2_3)/2 + L_1*L_2*θ'_0_1*θ'_1_2*sin(θ_1_2))*m_3
# Cálculo del par τ_θ3
# cálculo de la derivada parcial
D_θ3 := d/dθ'_2_3(Γ) collect, m_1, m_2, m_3 → ((L_3^2 + h_3^2)*(θ'_0_1/2 + θ'_1_2/2 + θ'_2_3/2)/12 + L_3*(L_3*θ'_0_1/2 + L_3*θ'_1_2/2 + L_3*θ'_2_3/2 + L_1*θ'_0_1*cos(θ_1_2 + θ_2_3) + L_2*θ'_0_1*cos(θ_2_3) + L_2*θ'_1_2*cos(θ_2_3))/2 + (L_3^2 + h_3^2)*(θ'_0_1 + θ'_1_2 + θ'_2_3)/24)*m_3
Dt_θ3 := D_θ3 substitute, θ_0_1 == θ_0_1(t); substitute, θ_1_2 == θ_1_2(t); substitute, θ_2_3 == θ_2_3(t); substitute, θ'_0_1 == θ'_0_1(t); substitute, θ'_1_2 == θ'_1_2(t); substitute, θ'_2_3 == θ'_2_3(t) → L_3^2*m_3*θ'_0_1(t)/3 + L_3^2*m_3*θ'_1_2(t)/3 + L_3^2*m_3*θ'_2_3(t)/3 + h_3^2*m_3*θ'_0_1(t)/12 + h_3^2*m_3*θ'_1_2(t)/12 + h_3^2*m_3*θ'_2_3(t)/12 + L_1*L_3*m_3*θ'_0_1(t)*cos(θ_1_2(t) + θ_2_3(t))/2 + L_2*L_3*m_3*θ'_0_1(t)*cos(θ_2_3(t))/2 + L_2*L_3*m_3*θ'_1_2(t)*cos(θ_2_3(t))/2
τ_θ3p := d/dt(Dt_θ3) - d/dθ_2_3(Γ) → m_3*(2*(L_1*θ'_0_1*sin(θ_1_2 + θ_2_3) + L_2*θ'_0_1*sin(θ_2_3) + L_2*θ'_1_2*sin(θ_2_3))*(L_3*θ'_0_1/2 + L_3*θ'_1_2/2 + L_3*θ'_2_3/2 + L_1*θ'_0_1*cos(θ_1_2 + θ_2_3) + L_2*θ'_0_1*cos(θ_2_3) + L_2*θ'_1_2*cos(θ_2_3)) - 2*(L_1*θ'_0_1*cos(θ_1_2 + θ_2_3) + L_2*θ'_0_1*cos(θ_2_3) + L_2*θ'_1_2*cos(θ_2_3))*(L_1*θ'_0_1*sin(θ_1_2 + θ_2_3) + L_2*θ'_0_1*sin(θ_2_3) + L_2*θ'_1_2*sin(θ_2_3)))/2 + L_3^2*m_3*d/dt(θ'_0_1(t))/3 + L_3^2*m_3*d/dt(θ'_1_2(t))/3 + L_3^2*m_3*d/dt(θ'_2_3(t))/3 + h_3^2*m_3*d/dt(θ'_0_1(t))/12 + h_3^2*m_3*d/dt(θ'_1_2(t))/12 + h_3^2*m_3*d/dt(θ'_2_3(t))/12 + L_3*g*m_3*cos(θ_0_1 + θ_1_2 + θ_2_3)/2 + L_1*L_3*m_3*d/dt(θ'_0_1(t))*cos(θ_1_2(t) + θ_2_3(t))/2 + L_2*L_3*m_3*d/dt(θ'_0_1(t))*cos(θ_2_3(t))/2 + L_2*L_3*m_3*d/dt(θ'_1_2(t))*cos(θ_2_3(t))/2 - L_1*L_3*m_3*θ'_0_1(t)*sin(θ_1_2(t) + θ_2_3(t))*(d/dt(θ_1_2(t)) + d/dt(θ_2_3(t)))/2 - L_2*L_3*m_3*θ'_0_1(t)*d/dt(θ_2_3(t))*sin(θ_2_3(t))/2 - L_2*L_3*m_3*θ'_1_2(t)*d/dt(θ_2_3(t))*sin(θ_2_3(t))/2
τ_θ3 := τ_θ3p substitute, θ_0_1(t) == θ_0_1; substitute, θ_1_2(t) == θ_1_2; substitute, θ_2_3(t) == θ2_3; substitute, d/dt(θ'_0_1(t)) == θ''_0_1; substitute, d/dt(θ'_1_2(t)) == θ''_1_2; substitute, d/dt(θ'_2_3(t)) == θ''_2_3; substitute, d/dt(θ_1_2(t)) == θ'_1_2; substitute, d/dt(θ_2_3(t)) == θ'_2_3; substitute, d/dt(θ_0_1(t)) == θ'_0_1; substitute, θ'_0_1(t) == θ'_0_1; collect, m_1, m_2, m_3 → (L_3^2*θ''_0_1/3 + L_3^2*θ''_1_2/3 + L_3^2*θ''_2_3/3 + h_3^2*θ''_0_1/12 + h_3^2*θ''_1_2/12 + h_3^2*θ''_2_3/12 + L_3*g*cos(θ_0_1 + θ_1_2 + θ_2_3)/2 + L_1*L_3*θ''_0_1*cos(θ2_3 + θ_1_2)/2 + L_2*L_3*θ''_0_1*cos(θ2_3)/2 + L_2*L_3*θ''_1_2*cos(θ2_3)/2 + L_1*L_3*θ'_0_1^2*sin(θ_1_2 + θ_2_3)/2 + L_2*L_3*θ'_0_1^2*sin(θ_2_3)/2 + L_2*L_3*θ'_1_2^2*sin(θ_2_3)/2 - L_2*L_3*θ'_2_3*θ'_1_2(t)*sin(θ2_3)/2 - L_1*L_3*θ'_0_1*θ'_1_2*sin(θ2_3 + θ_1_2)/2 - L_1*L_3*θ'_0_1*θ'_2_3*sin(θ2_3 + θ_1_2)/2 + L_1*L_3*θ'_0_1*θ'_1_2*sin(θ_1_2 + θ_2_3)/2 + L_1*L_3*θ'_0_1*θ'_2_3*sin(θ_1_2 + θ_2_3)/2 - L_2*L_3*θ'_0_1*θ'_2_3*sin(θ2_3)/2 + L_2*L_3*θ'_0_1*θ'_1_2*sin(θ_2_3) + L_2*L_3*θ'_0_1*θ'_2_3*sin(θ_2_3)/2 + L_2*L_3*θ'_1_2*θ'_2_3*sin(θ_2_3)/2)*m_3
# Vector de pares
τ_θ := [τ_θ1; τ_θ2; τ_θ3]
# Definición del modelo dinámico del robot
τ_θf(θ''_0_1, θ''_1_2, θ''_2_3, θ'_0_1, θ'_1_2, θ'_2_3, g) := τ_θ
# Cálulo de la matriz de inercial del robot
M_θ1 := τ_θ substitute, θ''_0_1 == 1; substitute, θ''_1_2 == 0; substitute, θ''_2_3 == 0; substitute, θ'_0_1 == 0; substitute, θ'_1_2 == 0; substitute, θ'_2_3 == 0; substitute, g == 0; collect, m_1, m_2, m_3 → [
    (L_1^2/3 + h_1^2/12)*m_1 + (L_1^2 + cos(θ_1_2)*L_1*L_2 + L_2^2/3 + h_2^2/12)*m_2 + (L_1^2 + 2*cos(θ_1_2)*L_1*L_2 + cos(θ2_3 + θ_1_2)*L_1*L_3 + L_2^2 + cos(θ2_3)*L_2*L_3 + L_3^2/3 + h_3^2/12)*m_3;
    (L_2^2/3 + L_1*cos(θ_1_2)*L_2/2 + h_2^2/12)*m_2 + (L_2^2 + cos(θ2_3)*L_2*L_3 + L_1*cos(θ_1_2)*L_2 + L_3^2/3 + L_1*cos(θ2_3 + θ_1_2)*L_3/2 + h_3^2/12)*m_3;
    (L_3^2/3 + h_3^2/12 + L_1*L_3*cos(θ2_3 + θ_1_2)/2 + L_2*L_3*cos(θ2_3)/2)*m_3
]
M_θ2 := τ_θ substitute, θ''_0_1 == 0; substitute, θ''_1_2 == 1; substitute, θ''_2_3 == 0; substitute, θ'_0_1 == 0; substitute, θ'_1_2 == 0; substitute, θ'_2_3 == 0; substitute, g == 0; collect, m_1, m_2, m_3 → [
    (L_2^2/3 + L_1*cos(θ_1_2)*L_2/2 + h_2^2/12)*m_2 + (L_2^2 + cos(θ2_3)*L_2*L_3 + L_1*cos(θ_1_2)*L_2 + L_3^2/3 + L_1*cos(θ2_3 + θ_1_2)*L_3/2 + h_3^2/12)*m_3;
    (L_2^2/3 + h_2^2/12)*m_2 + (L_2^2 + cos(θ2_3)*L_2*L_3 + L_3^2/3 + h_3^2/12)*m_3;
    (L_3^2/3 + L_2*cos(θ2_3)*L_3/2 + h_3^2/12)*m_3
]
M_θ3 := τ_θ substitute, θ''_0_1 == 0; substitute, θ''_1_2 == 0; substitute, θ''_2_3 == 1; substitute, θ'_0_1 == 0; substitute, θ'_1_2 == 0; substitute, θ'_2_3 == 0; substitute, g == 0; collect, m_1, m_2, m_3 → [
    (L_3^2/3 + h_3^2/12 + L_1*L_3*cos(θ2_3 + θ_1_2)/2 + L_2*L_3*cos(θ2_3)/2)*m_3;
    (L_3^2/3 + L_2*cos(θ2_3)*L_3/2 + h_3^2/12)*m_3;
    (L_3^2/3 + h_3^2/12)*m_3
]
M_θ1[1] → m_3*(L_2^2 + cos(θ2_3)*L_2*L_3 + L_1*cos(θ_1_2)*L_2 + L_3^2/3 + L_1*cos(θ2_3 + θ_1_2)*L_3/2 + h_3^2/12) + m_2*(L_2^2/3 + L_1*cos(θ_1_2)*L_2/2 + h_2^2/12)
M_θ := [M_θ1[0], M_θ2[0], M_θ3[0]; M_θ1[1], M_θ2[1], M_θ3[1]; M_θ1[2], M_θ2[2], M_θ3[2]]
M_θ → [
    m_3*(L_1^2 + 2*cos(θ_1_2)*L_1*L_2 + cos(θ2_3 + θ_1_2)*L_1*L_3 + L_2^2 + cos(θ2_3)*L_2*L_3 + L_3^2/3 + h_3^2/12) + m_1*(L_1^2/3 + h_1^2/12) + m_2*(L_1^2 + cos(θ_1_2)*L_1*L_2 + L_2^2/3 + h_2^2/12), m_3*(L_2^2 + cos(θ2_3)*L_2*L_3 + L_1*cos(θ_1_2)*L_2 + L_3^2/3 + L_1*cos(θ2_3 + θ_1_2)*L_3/2 + h_3^2/12) + m_2*(L_2^2/3 + L_1*cos(θ_1_2)*L_2/2 + h_2^2/12), m_3*(L_3^2/3 + h_3^2/12 + L_1*L_3*cos(θ2_3 + θ_1_2)/2 + L_2*L_3*cos(θ2_3)/2);
    m_3*(L_2^2 + cos(θ2_3)*L_2*L_3 + L_1*cos(θ_1_2)*L_2 + L_3^2/3 + L_1*cos(θ2_3 + θ_1_2)*L_3/2 + h_3^2/12) + m_2*(L_2^2/3 + L_1*cos(θ_1_2)*L_2/2 + h_2^2/12), m_2*(L_2^2/3 + h_2^2/12) + m_3*(L_2^2 + cos(θ2_3)*L_2*L_3 + L_3^2/3 + h_3^2/12), m_3*(L_3^2/3 + L_2*cos(θ2_3)*L_3/2 + h_3^2/12);
    m_3*(L_3^2/3 + h_3^2/12 + L_1*L_3*cos(θ2_3 + θ_1_2)/2 + L_2*L_3*cos(θ2_3)/2), m_3*(L_3^2/3 + L_2*cos(θ2_3)*L_3/2 + h_3^2/12), m_3*(L_3^2/3 + h_3^2/12)
]
q''´ := [θ''_0_1; θ''_1_2; θ''_2_3]
# Cálculo del vector de efectos de Coriolis
V_θ := τ_θ substitute, θ''_0_1 == 0; substitute, θ''_1_2 == 0; substitute, θ''_2_3 == 0; substitute, θ'_0_1 == θ'_0_1; substitute, θ'_1_2 == θ'_1_2; substitute, θ'_2_3 == θ'_2_3; substitute, θ'_1_2(t) == θ'_1_2; substitute, θ'_0_1(t) == θ'_0_1; substitute, θ'_2_3(t) == θ'_2_3; substitute, g == 0; collect, m_1, m_2, m_3 → [
    (-L_1*L_2*sin(θ_1_2)*θ'_1_2^2/2 - L_1*L_2*θ'_0_1*sin(θ_1_2)*θ'_1_2)*m_2 + (-L_1*L_3*θ'_1_2^2*sin(θ2_3 + θ_1_2)/2 - L_1*L_3*θ'_2_3^2*sin(θ2_3 + θ_1_2)/2 - L_2*L_3*θ'_2_3^2*sin(θ2_3)/2 - L_1*L_2*θ'_1_2^2*sin(θ_1_2) - L_1*L_3*θ'_0_1*θ'_1_2*sin(θ2_3 + θ_1_2) - L_1*L_3*θ'_0_1*θ'_2_3*sin(θ2_3 + θ_1_2) - L_1*L_3*θ'_1_2*θ'_2_3*sin(θ2_3 + θ_1_2) - L_2*L_3*θ'_0_1*θ'_2_3*sin(θ2_3) - L_2*L_3*θ'_1_2*θ'_2_3*sin(θ2_3) - 2*L_1*L_2*θ'_0_1*θ'_1_2*sin(θ_1_2))*m_3;
    L_1*L_2*θ'_0_1^2*sin(θ_1_2)/2*m_2 + (L_1*L_3*θ'_0_1^2*sin(θ_1_2 + θ_2_3)/2 - L_2*L_3*θ'_2_3^2*sin(θ2_3)/2 + L_1*L_2*θ'_0_1^2*sin(θ_1_2) - L_1*L_3*θ'_0_1*θ'_1_2*sin(θ2_3 + θ_1_2)/2 - L_1*L_3*θ'_0_1*θ'_2_3*sin(θ2_3 + θ_1_2)/2 + L_1*L_3*θ'_0_1*θ'_1_2*sin(θ_1_2 + θ_2_3)/2 + L_1*L_3*θ'_0_1*θ'_2_3*sin(θ_1_2 + θ_2_3)/2 - L_2*L_3*θ'_0_1*θ'_2_3*sin(θ2_3) - L_2*L_3*θ'_1_2*θ'_2_3*sin(θ2_3))*m_3;
    L_3*(L_1*θ'_0_1^2*sin(θ_1_2 + θ_2_3) + L_2*θ'_0_1^2*sin(θ_2_3) + L_2*θ'_1_2^2*sin(θ_2_3) - L_1*θ'_0_1*θ'_1_2*sin(θ2_3 + θ_1_2) - L_1*θ'_0_1*θ'_2_3*sin(θ2_3 + θ_1_2) + L_1*θ'_0_1*θ'_1_2*sin(θ_1_2 + θ_2_3) + L_1*θ'_0_1*θ'_2_3*sin(θ_1_2 + θ_2_3) - L_2*θ'_0_1*θ'_2_3*sin(θ2_3) - L_2*θ'_1_2*θ'_2_3*sin(θ2_3) + 2*L_2*θ'_0_1*θ'_1_2*sin(θ_2_3) + L_2*θ'_0_1*θ'_2_3*sin(θ_2_3) + L_2*θ'_1_2*θ'_2_3*sin(θ_2_3))/2*m_3
]
# Cálculo del vector de efectos de gravedad
G_θ := τ_θ substitute, θ''_0_1 == 0; substitute, θ''_1_2 == 0; substitute, θ''_2_3 == 0; substitute, θ'_0_1 == 0; substitute, θ'_1_2 == 0; substitute, θ'_2_3 == 0; substitute, θ'_1_2(t) == 0; substitute, θ'_0_1(t) == 0; substitute, θ'_2_3(t) == 0; substitute, g == g; collect, m_1, m_2, m_3 → [
    L_1*g*cos(θ_0_1)/2*m_1 + (L_2*g*cos(θ_0_1 + θ_1_2)/2 + L_1*g*cos(θ_0_1))*m_2 + (L_2*g*cos(θ_0_1 + θ_1_2) + L_1*g*cos(θ_0_1) + L_3*g*cos(θ_0_1 + θ_1_2 + θ_2_3)/2)*m_3;
    L_2*g*cos(θ_0_1 + θ_1_2)/2*m_2 + (L_2*g*cos(θ_0_1 + θ_1_2) + L_3*g*cos(θ_0_1 + θ_1_2 + θ_2_3)/2)*m_3;
    L_3*g*cos(θ_0_1 + θ_1_2 + θ_2_3)/2*m_3
]
